# Лабораторная работа №6
# Тема: Итеррационные методы решения систем линейных алгебраических уравнений. Метод простой итерации. Метод
# Цель: Изучить методы программирования матриц
# Выполнил студент группы 316ст
# Волковский Виталий
# Вриант №4
ORIGIN ≡ 1
i := 1 .. 3
j := 1 .. 3
A1 := [7.44, -2.46, 2.74, -3.05; 5.41, -1.25, 2.01, 2.57; 1.15, 3.81, -0.92, -1.15]
F[i] := A1[i, 4]
F = [-3.05; 2.57; -1.15]
A[i, j] := A1[i, j]
A = [7.44, -2.46, 2.74; 5.41, -1.25, 2.01; 1.15, 3.81, -0.92]
X := A^-1*F
X = [-7.17999; 8.0493; 25.6096]
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j := 1 .. 4
A[1, j] := A1[1, j]
A[3, j] := (33*A1)[1, j] - (48*A1)[2, j] + (5*A1)[3, j]
A[2, j] := A1[3, j]
A = [7.44, -2.46, 2.74, -3.05; 1.15, 3.81, -0.92, -1.15; -8.41, -2.13, -10.66, -229.76]
A2 := A
A2 = [7.44, -2.46, 2.74, -3.05; 1.15, 3.81, -0.92, -1.15; -8.41, -2.13, -10.66, -229.76]
A3[i, j] := -A2[i, j]/A2[i, i]
A3 = [
    -1, 0.330645, -0.36828, 0.409946;
    -0.301837, -1, 0.24147, 0.301837;
    -0.788931, -0.199812, -1, -21.5535
]
j := 1 .. 4
j := 1 .. 3
F3[i] := -A3[i, 4]
i := 1 .. 3
A3[i, i] := 0
A3 = [
    0, 0.330645, -0.36828, 0.409946;
    -0.301837, 0, 0.24147, 0.301837;
    -0.788931, -0.199812, 0, -21.5535
]
F3 = [-0.409946; -0.301837; 21.5535]
sum(|A3[i, j]|, j = 1 .. 3) = [0.698925; 0.543307; 0.988743]
sum(|A3[i, j]|, i = 1 .. 3) = [1.09077; 0.530458; 0.609749]
sum(A3[i, j]^2, i = 1 .. 3) = [0.713517; 0.149251; 0.193938]
# Проверка достаточного условия сходимости метода простой итерации: каждая из трех сумм по модулю <1
res(ε) :=
    k ← 0
    X0 ← F3
    for i ∈ 1 .. 3
        X1[i] ← sum(A3[i, j]*X0[j], j = 1 .. 3) + F3[i]
    while (|X0[1] - X1[1]| > ε) and (|X0[2] - X1[2]| > ε) and (|X0[3] - X1[3]| > ε)
        X0 ← X1
        for i ∈ 1 .. 3
            X1[i] ← sum(A3[i, j]*X0[j], j = 1 .. 3) + F3[i]
        k ← k + 1
    [X1[1]; X1[2]; X1[3]; k]
res(0.000001) = [-7.17998; 8.0493; 25.6096; 21]
# Метод Зейделя
res1(ε) :=
    k ← 0
    X0 ← F3
    for i ∈ 1 .. 3
        X1[i] ← sum(A3[i, j]*X0[j], j = 1 .. 3) + F3[i]
    X1[2] ← A3[2, 1]*X1[1] + A3[2, 3]*X0[3] + F3[2]
    X1[3] ← A3[3, 1]*X1[1] + A3[3, 2]*X1[2] + F3[3]
    while (|X0[1] - X1[1]| > ε) and (|X0[2] - X1[2]| > ε) and (|X0[3] - X1[3]| > ε)
        X0 ← X1
        for i ∈ 1 .. 3
            X1[i] ← sum(A3[i, j]*X0[j], j = 1 .. 3) + F3[i]
        X1[2] ← A3[2, 1]*X1[1] + A3[2, 3]*X0[3] + F3[2]
        X1[3] ← A3[3, 1]*X1[1] + A3[3, 2]*X1[2] + F3[3]
        k ← k + 1
    [X1[1]; X1[2]; X1[3]; k]
res1(0.000000001) = [-7.17999; 8.0493; 25.6096; 15]
# Вывод: Изучил методы программирования матриц. При помощи метода простой итерации, а также метода Зейделя.
